Tue 01/24/2023
01:02 PM
$PROBLEM DIAZEPAMPOP
$INPUT ID AMT TIME DV EVID MDV
$DATA DZNMDAT.csv IGNORE=C
$SUBROUTINES OTHER=FDEGL.f90
$PRED

MU_1=LOG(THETA(1))
K2=EXP(MU_1+ETA(1))

TVA=THETA(2)
alpha=TVA

vectra(1)=alpha
vectra(2)=K2

if(time.gt.0) then
tstep=0.05
N=TIME/tstep
Np=2
Dim=1
" CALL FDEGL(VECTRA,VECTRB,time,ff,int(N),Int(Dim),AMT,int(Np))
else
N=0
VECTRB(1)=AMT
" CALL FDEGL(VECTRA,VECTRB,time,ff,int(N),Int(Dim),AMT,int(Np))
endif
ipre=ff
Y=IPRE*(1+EPS(1))
$THETA
       (2,40,50)
       (0.2,0.4,0.9)
$OMEGA
        0.08
$SIGMA
        0.1
$EST METHOD=SAEM AUTO=1 INTERACTION OPTMAP=2 ETADER=2
$EST METHOD=IMP INTERACTION EONLY=1 NITER=5 ISAMPLE=3000 PRINT=1 SIGL=8 NOPRIOR=1
$COV
$TABLE  ID AMT  TIME K2 ONEHEADER NOAPPEND FILE=DZN_RES.TXT

NM-TRAN MESSAGES
 WARNINGS AND ERRORS (IF ANY) FOR PROBLEM    1
 (WARNING  2) NM-TRAN INFERS THAT THE DATA ARE POPULATION.

1NONLINEAR MIXED EFFECTS MODEL PROGRAM (NONMEM) VERSION 7.4.4
 ORIGINALLY DEVELOPED BY STUART BEAL, LEWIS SHEINER, AND ALISON BOECKMANN
 CURRENT DEVELOPERS ARE ROBERT BAUER, ICON DEVELOPMENT SOLUTIONS,
 AND ALISON BOECKMANN. IMPLEMENTATION, EFFICIENCY, AND STANDARDIZATION
 PERFORMED BY NOUS INFOSYSTEMS.
 PROBLEM NO.:         1
 DIAZEPAMPOP
 TOT. NO. OF OBS RECS:      179
 TOT. NO. OF INDIVIDUALS:       12
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 #TBLN:      1
 #METH: Stochastic Approximation Expectation-Maximization (No Prior)
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
 #TERM:
 STOCHASTIC PORTION WAS COMPLETED
 REDUCED STOCHASTIC PORTION WAS COMPLETED

 ETABAR IS THE ARITHMETIC MEAN OF THE ETA-ESTIMATES,
 AND THE P-VALUE IS GIVEN FOR THE NULL HYPOTHESIS THAT THE TRUE MEAN IS 0.

 ETABAR:        -2.6086E-06
 SE:             8.5261E-02
 N:                      12

 P VAL.:         9.9998E-01

 ETASHRINKSD(%)  2.4919E+00
 ETASHRINKVR(%)  4.9217E+00
 EBVSHRINKSD(%)  2.4863E+00
 EBVSHRINKVR(%)  4.9108E+00
 EPSSHRINKSD(%)  2.8719E+00
 EPSSHRINKVR(%)  5.6612E+00


 TOTAL DATA POINTS NORMALLY DISTRIBUTED (N):          179
 N*LOG(2PI) CONSTANT TO OBJECTIVE FUNCTION:    328.97999488727282
 OBJECTIVE FUNCTION VALUE WITHOUT CONSTANT:   -1074.4560440286830
 OBJECTIVE FUNCTION VALUE WITH CONSTANT:      -745.47604914141016
 REPORTED OBJECTIVE FUNCTION DOES NOT CONTAIN CONSTANT

 TOTAL EFFECTIVE ETAS (NIND*NETA):                            12
 NIND*NETA*LOG(2PI) CONSTANT TO OBJECTIVE FUNCTION:    22.054524796912144
 OBJECTIVE FUNCTION VALUE WITHOUT CONSTANT:   -1074.4560440286830
 OBJECTIVE FUNCTION VALUE WITH CONSTANT:      -1052.4015192317709
 REPORTED OBJECTIVE FUNCTION DOES NOT CONTAIN CONSTANT


 #TERE:
 Elapsed estimation  time in seconds:   356.22
 Elapsed covariance  time in seconds:     0.00

 ********************           STOCHASTIC APPROXIMATION EXPECTATION-MAXIMIZATION (NO PRIOR)         ********************
 #OBJT:**************                        FINAL VALUE OF LIKELIHOOD FUNCTION                      ********************
 #OBJV:********************************************    -1074.456       **************************************************

 ********************           STOCHASTIC APPROXIMATION EXPECTATION-MAXIMIZATION (NO PRIOR)         ********************
 ********************                             FINAL PARAMETER ESTIMATE                           ********************

 THETA - VECTOR OF FIXED EFFECTS PARAMETERS   *********
         TH 1      TH 2
         1.71E+01  5.84E-01

 OMEGA - COV MATRIX FOR RANDOM EFFECTS - ETAS  ********
         ETA1
 ETA1
+        1.00E-01

 SIGMA - COV MATRIX FOR RANDOM EFFECTS - EPSILONS  ****
         EPS1
 EPS1
+        8.83E-02

 OMEGA - CORR MATRIX FOR RANDOM EFFECTS - ETAS  *******
         ETA1
 ETA1
+        3.16E-01

 SIGMA - CORR MATRIX FOR RANDOM EFFECTS - EPSILONS  ***
         EPS1
 EPS1
+        2.97E-01

 ********************           STOCHASTIC APPROXIMATION EXPECTATION-MAXIMIZATION (NO PRIOR)         ********************
 ********************                          STANDARD ERROR OF ESTIMATE (S)                        ********************

 THETA - VECTOR OF FIXED EFFECTS PARAMETERS   *********
         TH 1      TH 2
         2.04E+00  1.07E-02

 OMEGA - COV MATRIX FOR RANDOM EFFECTS - ETAS  ********
         ETA1
 ETA1
+        5.12E-02

 SIGMA - COV MATRIX FOR RANDOM EFFECTS - EPSILONS  ****
         EPS1
 EPS1
+        8.43E-03

 OMEGA - CORR MATRIX FOR RANDOM EFFECTS - ETAS  *******
         ETA1
 ETA1
+        8.10E-02

 SIGMA - CORR MATRIX FOR RANDOM EFFECTS - EPSILONS  ***
         EPS1
 EPS1
+        1.42E-02

 ********************           STOCHASTIC APPROXIMATION EXPECTATION-MAXIMIZATION (NO PRIOR)         ********************
 ********************                        COVARIANCE MATRIX OF ESTIMATE (S)                       ********************

            TH 1      TH 2      OM11      SG11
 TH 1
+        4.16E+00
 TH 2
+       -6.98E-03  1.14E-04
 OM11
+       -1.26E-02 -2.12E-04  2.62E-03
 SG11
+        8.56E-03 -7.75E-05  1.01E-04  7.11E-05

 ********************           STOCHASTIC APPROXIMATION EXPECTATION-MAXIMIZATION (NO PRIOR)         ********************
 ********************                        CORRELATION MATRIX OF ESTIMATE (S)                      ********************

            TH 1      TH 2      OM11      SG11
 TH 1
+        2.04E+00
 TH 2
+       -3.21E-01  1.07E-02
 OM11
+       -1.20E-01 -3.88E-01  5.12E-02
 SG11
+        4.98E-01 -8.62E-01  2.34E-01  8.43E-03
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 #TBLN:      2
 #METH: Objective Function Evaluation by Importance Sampling (No Prior)
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
 #TERM:
 EXPECTATION ONLY PROCESS COMPLETED

 ETABAR IS THE ARITHMETIC MEAN OF THE ETA-ESTIMATES,
 AND THE P-VALUE IS GIVEN FOR THE NULL HYPOTHESIS THAT THE TRUE MEAN IS 0.

 ETABAR:        -6.0591E-03
 SE:             8.4845E-02
 N:                      12

 P VAL.:         9.4307E-01

 ETASHRINKSD(%)  2.9672E+00
 ETASHRINKVR(%)  5.8463E+00
 EBVSHRINKSD(%)  2.4514E+00
 EBVSHRINKVR(%)  4.8428E+00
 EPSSHRINKSD(%)  3.4439E+00
 EPSSHRINKVR(%)  6.7691E+00


 TOTAL DATA POINTS NORMALLY DISTRIBUTED (N):          179
 N*LOG(2PI) CONSTANT TO OBJECTIVE FUNCTION:    328.97999488727282
 OBJECTIVE FUNCTION VALUE WITHOUT CONSTANT:   -1018.6946630407525
 OBJECTIVE FUNCTION VALUE WITH CONSTANT:      -689.71466815347969
 REPORTED OBJECTIVE FUNCTION DOES NOT CONTAIN CONSTANT

 TOTAL EFFECTIVE ETAS (NIND*NETA):                            12


 #TERE:
 Elapsed estimation  time in seconds:   161.46
 Elapsed covariance  time in seconds:   289.50

 ********************         OBJECTIVE FUNCTION EVALUATION BY IMPORTANCE SAMPLING (NO PRIOR)        ********************
 #OBJT:**************                        FINAL VALUE OF OBJECTIVE FUNCTION                       ********************
 #OBJV:********************************************    -1018.695       **************************************************

 ********************         OBJECTIVE FUNCTION EVALUATION BY IMPORTANCE SAMPLING (NO PRIOR)        ********************
 ********************                             FINAL PARAMETER ESTIMATE                           ********************

 THETA - VECTOR OF FIXED EFFECTS PARAMETERS   *********
         TH 1      TH 2
         1.71E+01  5.84E-01

 OMEGA - COV MATRIX FOR RANDOM EFFECTS - ETAS  ********
         ETA1
 ETA1
+        1.00E-01

 SIGMA - COV MATRIX FOR RANDOM EFFECTS - EPSILONS  ****
         EPS1
 EPS1
+        8.83E-02

 OMEGA - CORR MATRIX FOR RANDOM EFFECTS - ETAS  *******
         ETA1
 ETA1
+        3.16E-01

 SIGMA - CORR MATRIX FOR RANDOM EFFECTS - EPSILONS  ***
         EPS1
 EPS1
+        2.97E-01

 ********************         OBJECTIVE FUNCTION EVALUATION BY IMPORTANCE SAMPLING (NO PRIOR)        ********************
 ********************                         STANDARD ERROR OF ESTIMATE (RSR)                       ********************

 THETA - VECTOR OF FIXED EFFECTS PARAMETERS   *********
         TH 1      TH 2
         2.46E+00  2.91E-02

 OMEGA - COV MATRIX FOR RANDOM EFFECTS - ETAS  ********
         ETA1
 ETA1
+        4.03E-02

 SIGMA - COV MATRIX FOR RANDOM EFFECTS - EPSILONS  ****
         EPS1
 EPS1
+        2.85E-02

 OMEGA - CORR MATRIX FOR RANDOM EFFECTS - ETAS  *******
         ETA1
 ETA1
+        6.36E-02

 SIGMA - CORR MATRIX FOR RANDOM EFFECTS - EPSILONS  ***
         EPS1
 EPS1
+        4.80E-02

 ********************         OBJECTIVE FUNCTION EVALUATION BY IMPORTANCE SAMPLING (NO PRIOR)        ********************
 ********************                       COVARIANCE MATRIX OF ESTIMATE (RSR)                      ********************

            TH 1      TH 2      OM11      SG11
 TH 1
+        6.06E+00
 TH 2
+       -5.85E-02  8.46E-04
 OM11
+        2.24E-02 -7.45E-05  1.62E-03
 SG11
+       -5.31E-02  7.27E-04 -2.43E-04  8.15E-04

 ********************         OBJECTIVE FUNCTION EVALUATION BY IMPORTANCE SAMPLING (NO PRIOR)        ********************
 ********************                       CORRELATION MATRIX OF ESTIMATE (RSR)                     ********************

            TH 1      TH 2      OM11      SG11
 TH 1
+        2.46E+00
 TH 2
+       -8.16E-01  2.91E-02
 OM11
+        2.26E-01 -6.36E-02  4.03E-02
 SG11
+       -7.55E-01  8.76E-01 -2.12E-01  2.85E-02
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 Elapsed postprocess time in seconds:     0.42
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 Elapsed finaloutput time in seconds:     0.02
 #CPUT: Total CPU Time in Seconds,      807.031
